10/04/2024
09:57
$PROB  BRV Paediatric popPK model ; run625 analysis simulated data

$DATA  DAT_P.csv IGNORE=@
$INPUT ID TIME MDV AMT RATE EVID SS II DV WT AGE AED

$SUB ADVAN2
$PK

;Allometrically scaled to 70kg WT patient
TVCL   = THETA(2)
TVVC   = THETA(3)
TVKA   = THETA(4)
ALLOCL = THETA(5)
ALLOVC = THETA(6)
AEDCL  = THETA(7)

CL    = EXP(LOG(TVCL) + ALLOCL*(LOG(WT/70)) + AEDCL*AED + ETA(1)) ;Clearance (L/hr)
VC    = EXP(LOG(TVVC) + ALLOVC*(LOG(WT/70)) + ETA(2)) ;Volume (L)
KA    = EXP(LOG(TVKA) + ETA(3)) ;Ka (1/hr)

S2    = VC
K     = CL/VC

$ERROR
IPRED = F
RESCV = THETA(1)
IRES  = DV-IPRED
W     = IPRED*RESCV
IWRES = (DV-IPRED)/W
Y     = IPRED+W*EPS(1)

$THETA  (0.001,0.22);Res.error (SD/mean)
$THETA  (0.001,3.7) ;CL (L/hr)
$THETA  (0.01,50)   ;V (L)
$THETA  (0.01,1.5)  ;Ka (1/hr)
$THETA  0.75 FIX    ;WT on Cl
$THETA  1    FIX    ;WT on V
$THETA  0.2         ;AED effect on CL

$OMEGA .1 .3 1.3

$SIGMA 1 FIXED

$ESTIMATION PRINT=10 MAXEVAL=9999 NOABORT METHOD=1
            POSTHOC INTERACTION NOOBT
$COVARIANCE PRINT=E UNCONDITIONAL
$TABLE
 ID WT AGE AED CL VC KA
 ONEHEADER NOPRINT NOAPPEND FIRSTONLY FILE=run625.csv

NM-TRAN MESSAGES
 WARNINGS AND ERRORS (IF ANY) FOR PROBLEM    1
 (WARNING  2) NM-TRAN INFERS THAT THE DATA ARE POPULATION.

1NONLINEAR MIXED EFFECTS MODEL PROGRAM (NONMEM) VERSION 7.5.0
 ORIGINALLY DEVELOPED BY STUART BEAL, LEWIS SHEINER, AND ALISON BOECKMANN
 CURRENT DEVELOPERS ARE ROBERT BAUER, ICON DEVELOPMENT SOLUTIONS,
 AND ALISON BOECKMANN. IMPLEMENTATION, EFFICIENCY, AND STANDARDIZATION
 PERFORMED BY NOUS INFOSYSTEMS.
 PROBLEM NO.:         1
 BRV Paediatric popPK model ; run625 analysis simulated data
 TOT. NO. OF OBS RECS:      855
 TOT. NO. OF INDIVIDUALS:      235
 ONE COMPARTMENT MODEL WITH FIRST-ORDER ABSORPTION (ADVAN2)
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 #TBLN:      1
 #METH: First Order Conditional Estimation with Interaction
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
 #TERM:
0MINIMIZATION SUCCESSFUL
 HOWEVER, PROBLEMS OCCURRED WITH THE MINIMIZATION.
 REGARD THE RESULTS OF THE ESTIMATION STEP CAREFULLY, AND ACCEPT THEM ONLY
 AFTER CHECKING THAT THE COVARIANCE STEP PRODUCES REASONABLE OUTPUT.
 NO. OF FUNCTION EVALUATIONS USED:      382
 NO. OF SIG. DIGITS IN FINAL EST.:  3.9

 ETABAR IS THE ARITHMETIC MEAN OF THE ETA-ESTIMATES,
 AND THE P-VALUE IS GIVEN FOR THE NULL HYPOTHESIS THAT THE TRUE MEAN IS 0.

 ETABAR:         6.5740E-04 -1.8695E-03  2.3404E-11
 SE:             1.1168E-02  2.8461E-03  1.0295E-10
 N:                     232         232         232

 P VAL.:         9.5306E-01  5.1127E-01  8.2017E-01

 ETASHRINKSD(%)  2.6010E+01  6.8354E+01  9.9997E+01
 ETASHRINKVR(%)  4.5255E+01  8.9986E+01  1.0000E+02
 EBVSHRINKSD(%)  2.6406E+01  6.8863E+01  9.9997E+01
 EBVSHRINKVR(%)  4.5839E+01  9.0305E+01  1.0000E+02
 RELATIVEINF(%)  5.3913E+01  7.6237E+00  7.1776E-08
 EPSSHRINKSD(%)  7.4167E+00
 EPSSHRINKVR(%)  1.4283E+01


 TOTAL DATA POINTS NORMALLY DISTRIBUTED (N):          855
 N*LOG(2PI) CONSTANT TO OBJECTIVE FUNCTION:    1571.38489177999
 OBJECTIVE FUNCTION VALUE WITHOUT CONSTANT:   -726.000104626168
 OBJECTIVE FUNCTION VALUE WITH CONSTANT:       845.384787153822
 REPORTED OBJECTIVE FUNCTION DOES NOT CONTAIN CONSTANT

 TOTAL EFFECTIVE ETAS (NIND*NETA):                           696


 #TERE:
 Elapsed estimation  time in seconds:     3.23
 Elapsed covariance  time in seconds:     1.19
 Elapsed postprocess time in seconds:     0.02

 ********************               FIRST ORDER CONDITIONAL ESTIMATION WITH INTERACTION              ********************
 #OBJT:**************                       MINIMUM VALUE OF OBJECTIVE FUNCTION                      ********************
 #OBJV:********************************************     -726.000       **************************************************

 ********************               FIRST ORDER CONDITIONAL ESTIMATION WITH INTERACTION              ********************
 ********************                             FINAL PARAMETER ESTIMATE                           ********************

 THETA - VECTOR OF FIXED EFFECTS PARAMETERS   *********
         TH 1      TH 2      TH 3      TH 4      TH 5      TH 6      TH 7
         3.11E-01  4.19E+00  6.49E+01  2.10E+00  7.50E-01  1.00E+00  2.36E-01

 OMEGA - COV MATRIX FOR RANDOM EFFECTS - ETAS  ********
         ETA1      ETA2      ETA3
 ETA1
+        5.31E-02
 ETA2
+        0.00E+00  1.88E-02
 ETA3
+        0.00E+00  0.00E+00  2.93E-09

 SIGMA - COV MATRIX FOR RANDOM EFFECTS - EPSILONS  ****
         EPS1
 EPS1
+        1.00E+00

 OMEGA - CORR MATRIX FOR RANDOM EFFECTS - ETAS  *******
         ETA1      ETA2      ETA3
 ETA1
+        2.30E-01
 ETA2
+        0.00E+00  1.37E-01
 ETA3
+        0.00E+00  0.00E+00  5.41E-05

 SIGMA - CORR MATRIX FOR RANDOM EFFECTS - EPSILONS  ***
         EPS1
 EPS1
+        1.00E+00

 ********************               FIRST ORDER CONDITIONAL ESTIMATION WITH INTERACTION              ********************
 ********************                            STANDARD ERROR OF ESTIMATE                          ********************

 THETA - VECTOR OF FIXED EFFECTS PARAMETERS   *********
         TH 1      TH 2      TH 3      TH 4      TH 5      TH 6      TH 7
         9.14E-03  1.10E-01  2.53E+00  2.92E-01 ......... .........  3.87E-02

 OMEGA - COV MATRIX FOR RANDOM EFFECTS - ETAS  ********
         ETA1      ETA2      ETA3
 ETA1
+        8.11E-03
 ETA2
+       .........  1.21E-02
 ETA3
+       ......... .........  4.40E-09

 SIGMA - COV MATRIX FOR RANDOM EFFECTS - EPSILONS  ****
         EPS1
 EPS1
+       .........

 OMEGA - CORR MATRIX FOR RANDOM EFFECTS - ETAS  *******
         ETA1      ETA2      ETA3
 ETA1
+        1.76E-02
 ETA2
+       .........  4.39E-02
 ETA3
+       ......... .........  4.07E-05

 SIGMA - CORR MATRIX FOR RANDOM EFFECTS - EPSILONS  ***
         EPS1
 EPS1
+       .........

 ********************               FIRST ORDER CONDITIONAL ESTIMATION WITH INTERACTION              ********************
 ********************                          COVARIANCE MATRIX OF ESTIMATE                         ********************

            TH 1      TH 2      TH 3      TH 4      TH 5      TH 6      TH 7      OM11      OM12      OM13      OM22      OM23
             OM33      SG11
 TH 1
+        8.35E-05
 TH 2
+        1.63E-04  1.21E-02
 TH 3
+        2.15E-03  1.57E-02  6.38E+00
 TH 4
+        4.84E-05 -2.12E-03  2.48E-01  8.55E-02
 TH 5
+       ......... ......... ......... ......... .........
 TH 6
+       ......... ......... ......... ......... ......... .........
 TH 7
+       -6.99E-06 -2.58E-03  8.77E-04  8.66E-04 ......... .........  1.50E-03
 OM11
+       -1.21E-05 -9.52E-05 -2.68E-04 -3.08E-04 ......... .........  2.67E-05  6.58E-05
 OM12
+       ......... ......... ......... ......... ......... ......... ......... ......... .........
 OM13
+       ......... ......... ......... ......... ......... ......... ......... ......... ......... .........
 OM22
+       -2.68E-05 -6.50E-05  1.53E-02 -2.56E-04 ......... .........  1.64E-05 -6.84E-06 ......... .........  1.45E-04
 OM23
+       ......... ......... ......... ......... ......... ......... ......... ......... ......... ......... ......... .........
 OM33
+        2.90E-12 -4.09E-11  1.07E-09  1.56E-10 ......... .........  7.94E-13  1.09E-12 ......... ......... -5.12E-12 .........
          1.94E-17
 SG11
+       ......... ......... ......... ......... ......... ......... ......... ......... ......... ......... ......... .........
         ......... .........

 ********************               FIRST ORDER CONDITIONAL ESTIMATION WITH INTERACTION              ********************
 ********************                          CORRELATION MATRIX OF ESTIMATE                        ********************

            TH 1      TH 2      TH 3      TH 4      TH 5      TH 6      TH 7      OM11      OM12      OM13      OM22      OM23
             OM33      SG11
 TH 1
+        9.14E-03
 TH 2
+        1.62E-01  1.10E-01
 TH 3
+        9.31E-02  5.64E-02  2.53E+00
 TH 4
+        1.81E-02 -6.58E-02  3.36E-01  2.92E-01
 TH 5
+       ......... ......... ......... ......... .........
 TH 6
+       ......... ......... ......... ......... ......... .........
 TH 7
+       -1.97E-02 -6.05E-01  8.96E-03  7.65E-02 ......... .........  3.87E-02
 OM11
+       -1.64E-01 -1.07E-01 -1.31E-02 -1.30E-01 ......... .........  8.49E-02  8.11E-03
 OM12
+       ......... ......... ......... ......... ......... ......... ......... ......... .........
 OM13
+       ......... ......... ......... ......... ......... ......... ......... ......... ......... .........
 OM22
+       -2.43E-01 -4.90E-02  5.03E-01 -7.28E-02 ......... .........  3.52E-02 -7.00E-02 ......... .........  1.21E-02
 OM23
+       ......... ......... ......... ......... ......... ......... ......... ......... ......... ......... ......... .........
 OM33
+        7.21E-02 -8.46E-02  9.60E-02  1.21E-01 ......... .........  4.66E-03  3.06E-02 ......... ......... -9.65E-02 .........
          4.40E-09
 SG11
+       ......... ......... ......... ......... ......... ......... ......... ......... ......... ......... ......... .........
         ......... .........
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
 ********************               FIRST ORDER CONDITIONAL ESTIMATION WITH INTERACTION              ********************
 ********************                      EIGENVALUES OF COR MATRIX OF ESTIMATE                     ********************

             1         2         3         4         5         6         7         8
         2.68E-01  3.69E-01  8.29E-01  8.83E-01  1.03E+00  1.33E+00  1.58E+00  1.70E+00
 Elapsed finaloutput time in seconds:     0.03
 #CPUT: Total CPU Time in Seconds,        1.906
